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/BATCH
/COM,ANSYS RELEASE 2024 R1           BUILD 24.1      UP20231106       15:32:23
/input,menust,tmp,''
/GST,ON
/PLO,INFO,3
/GRO,CURL,ON
/CPLANE,1
WPSTYLE,,,,,,,,0
/INPUT,'FEM_Project_v0','txt','D:\FEM\PROJECT\Ansys\',, 0
/COM,ANSYS RELEASE 2024 R1           BUILD 24.1      UP20231106       15:32:35
/INPUT,'FEM_Project_v1','txt','D:\FEM\PROJECT\Ansys\',, 0
/COM,ANSYS RELEASE 2024 R1           BUILD 24.1      UP20231106       15:32:52
EPLOT
/SHRINK,0
/ESHAPE,1.0
/EFACET,1
/RATIO,1,1,1
/CFORMAT,32,0
/SHRINK,0
/ESHAPE,1
/EFACET,1
/RATIO,1,1,1
/CFORMAT,32,0
/LIG, 1 ,1
FINISH
/FILNAME,FEM_Project_v2
/CLEAR, START, NEW
/COM,ANSYS RELEASE 2024 R1           BUILD 24.1      UP20231106       15:35:18
/input,start,ans,'D:\Ansys\ANSYS Inc\ANSYS Student\v241\ANSYS\apdl\'
/FILNAME,FEM_Project_v2
/TITLE,Vertical blade mixer
*SET,L1 , 1400 ! Length of the first horizontal segment of the beam [mm]
*SET,L2 , 1200 ! Length of the second horizontal segment of the beam [mm]
*SET,L3 , 1400 ! Length of the third horizontal segment of the beam [mm]
*SET,H , 300   ! Portion of the blade above the water [mm]
*SET,H1 , 1200 ! Portion of the blade submerged in the water [mm]
!element 1 -> Horizontal beam
*SET,W3 , 150 !cross section width [mm]
*SET,H3 , 180  !cross section height [mm]
*SET,TS , 10   !cross section thickness [mm]
!element 2 -> Blade
!>>>User-defined section -> pale.sect <<<<!
*SET,TS1 , 12  ! Thickness of the blade surface [mm]
*SET,H2 , 120  ! Height of the blade beam [mm]
! >>>>> MATERIAL PROPERTIES <<<<<
*SET,E_Young , 210000 ! Young's modulus, [MPa]
*SET,ni , 0.29 ! Poisson's ratio
! >>>>> LOADING CONDITIONS <<<<<
*SET,F1 , 2870  ! Force applied to the inner blade [N]
*SET,F2 , 5340  ! Force applied to the outer blade [N]
*SET,MAY, 17900000 ! Moment applied by the motor [Nmm]
*SET,qT, 0.4774 ! Distributed load on the horizontal beam [N/mm]
*SET,Pp, 449.1 ! Blade weight [N]
! >>>>> other parameters <<<<<
*SET,ZofBlade , 41.1818 ! distance of the center of the blade section [mm]
*SET,E_length , 100 ! element length [mm]
*SET,Eps , 1E-4 ! selection tolerance
/PREP7
ET,1,BEAM189
!cross-sectional data of Horizontal beam
SECTYPE,1,BEAM,HREC
SECDATA,H3,W3,TS,TS,TS,TS
!cross-sectional data of Blade
SECTYPE,2,beam,mesh, pale
SECREAD, pale, sect,,mesh
! >>>>> MATERIAL PROPERTIES <<<<<
MP,EX,1,E_Young
MP,PRXY,1,ni
MP,dens,1,density
K,1,0,0,0
K,2,L1,0,0
K,3,L1+L2,0,0
K,4,L1+L2+L3,0,0
L,1,2
L,2,3
L,3,4
LESIZE,all,E_length !element size
TYPE,1
MAT,1
SECNUM,1
LMESH,all
Lsel,u,line,,all
K,10,L1,0,-W3/2+ZofBlade+(W3-(H2+TS1))/2 ! written to connect the blade to the!horizontal beam may be wrong
K,11,L1,-(H3/2),-W3/2+ZofBlade+(W3-(H2+TS1))/2
kdele,10
K,12,L1,-(H3/2)-H,-W3/2+ZofBlade+(W3-(H2+TS1))/2
K,13,L1,-(H3/2)-H-H1,-W3/2+ZofBlade+(W3-(H2+TS1))/2
K,14,L1,-(H3/2)-H-(H1/2),-W3/2+ZofBlade+(W3-(H2+TS1))/2
L,11,12
L,12,13
LESIZE,all,E_length !element size
TYPE,1
MAT,1
SECNUM,2
LMESH,all
Lsel,u,line,,all
K,21,L1+L2,-(H3/2),-W3/2+ZofBlade+(W3-(H2+TS1))/2
K,22,L1+L2,-(H3/2)-H,-W3/2+ZofBlade+(W3-(H2+TS1))/2
K,23,L1+L2,-(H3/2)-H-H1,-W3/2+ZofBlade+(W3-(H2+TS1))/2
K,24,L1+L2,-(H3/2)-H-(H1/2),-W3/2+ZofBlade+(W3-(H2+TS1))/2 ! point of!application of the force F2
!L,20,21
L,21,22
L,22,23
LESIZE,all,E_length !element size
TYPE,1
MAT,1
SECNUM,2
LMESH,all
Lsel,u,line,,all
KPLOT
/NUMBER,0
/NUMBER,0
ET,2,184,1,1
L,2,11
L,3,21
LESIZE,all,E_length !element size
TYPE,2
LMESH,all
! Internal pins
CPINTF,ux,eps
CPINTF,uy,eps
CPINTF,uz,eps
CPINTF,rotx,eps
CPINTF,roty,eps
CPINTF,rotz,eps
save
Fini
! >>>>> BOUNDARY CONDITIONS <<<<<
/SOLUTION
ANTYPE, STATIC, NEW !static solution
! Clamp the left end of the horizontal beam
NSEL, S, loc,y,-eps,+eps
NSEL,R,loc,x,-eps,+eps
D, ALL,ALL
Allsel,all
! Roller support at the right end of the horizontal beam that locks vertical !displacements and rotation about the x-axis
NSEL, S, loc,y,-eps,+eps
NSEL,R,loc,x,L1+L2+L3-eps,L1+L2+L3+eps
D, ALL,UY,0
D, ALL,ROTX,0
Allsel,all
! Concentrated force F1 applied to the inner blade in KeyPoint 14 in +Z !direction
ksel,s,kp,,2
nslk,s
F,all,Fz,F1
ALLSEL, all
! Concentrated force F2 applied to the outer blade in KeyPoint 24 in +Z !direction
ksel,s,kp,,3
nslk,s
F,all,Fz,F2
ALLSEL, all
! Gravity load
Acel,,9.81 !m/s^2
save
solve
FINISH
/LIG, 1 ,1
! eshape,1
! \eshaèe
! \eshape,1
EPLOT
/eshape,1
/SOLU
/STATUS,SOLU
SOLVE
FINISH
/POST1
PLDISP,1
PLDISP,1
KPLOT
EPLOT
EPLOT
PLDISP,0
PLDISP,1
/NUMBER,0
/NUMBER,0
EPLOT
EPLOT
KPLOT
! eshape,1
PLDISP,1
PLDISP,1
SAVE
FINISH
! /EXIT,ALL
/BATCH
/COM,ANSYS RELEASE 2024 R1           BUILD 24.1      UP20231106       16:21:43
/input,menust,tmp,''
/GST,ON
/PLO,INFO,3
/GRO,CURL,ON
/CPLANE,1
WPSTYLE,,,,,,,,0
/INPUT,'FEM_Project_v2','txt','D:\FEM\PROJECT\Ansys\',, 0
/COM,ANSYS RELEASE 2024 R1           BUILD 24.1      UP20231106       16:22:10
/POST1
/eshape,1
EPLOT
PLDISP,1
PLDISP,1
/LIG, 1 ,1
/LIG, 1 ,1
PLLS, , ,1,0,0
/NUMBER,0
/NUMBER,0
/post1
set,last
pldisp,1
/eshape,1
plnsol,s,x
EPLOT
/INPUT,'FEM_Project_v2','txt','D:\FEM\PROJECT\Ansys\',, 0
/COM,ANSYS RELEASE 2024 R1           BUILD 24.1      UP20231106       18:38:59
PRNSOL,U,COMP
PRRSOL,F
PRRSOL,M
FINISH
! /EXIT,ALL
