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/BATCH
/COM,ANSYS RELEASE 2024 R1           BUILD 24.1      UP20231106       18:24:40
/input,menust,tmp,''
/GST,ON
/PLO,INFO,3
/GRO,CURL,ON
/CPLANE,1
WPSTYLE,,,,,,,,0
/INPUT,'FEM_Project_v0','txt','C:\Users\feder\Desktop\FEM\PROJECT\Ansys\',, 0
/COM,ANSYS RELEASE 2024 R1           BUILD 24.1      UP20231106       18:25:01
/POST1
PLDISP,1
PLDISP,1
FINISH
/CLEAR, START, NEW
/COM,ANSYS RELEASE 2024 R1           BUILD 24.1      UP20231106       18:43:26
/input,start,ans,'D:\Ansys\ANSYS Inc\ANSYS Student\v241\ANSYS\apdl\'
/FILNAME,FEM_Project_v1
/TITLE,Vertical blade mixer
*SET,L1 , 1400
*SET,L2 , 1200
*SET,L3 , 1400
*SET,H , 300
*SET,H1 , 1200
*SET,W3 , 150
*SET,H3 , 180
*SET,TS , 10
*SET,TS1 , 12
*SET,H2 , 120
*SET,E_Young , 210000
*SET,ni , 0.29
*SET,F1 , 2870
*SET,F2 , 5340
*SET,ZofBlade , 41.1818
*SET,E_length , 100
*SET,Eps , 1E-4
/PREP7
ET,1,BEAM189
SECTYPE,1,BEAM,HREC
SECDATA,H3,W3,TS,TS,TS,TS
SECTYPE,2,beam,mesh, pale
SECREAD, pale, sect,,mesh
MP,EX,1,E_Young
MP,PRXY,1,ni
MP,dens,1,density
K,1,0,0,0
K,2,L1,0,0
K,3,L1+L2,0,0
K,4,L1+L2+L3,0,0
L,1,2
L,2,3
L,3,4
LESIZE,all,E_length
TYPE,1
MAT,1
SECNUM,1
LMESH,all
Lsel,u,line,,all
K,10,L1,0,-W3/2+ZofBlade+(W3-(H2+TS1))/2
K,11,L1,-(H3/2),-W3/2+ZofBlade+(W3-(H2+TS1))/2
K,12,L1,-(H3/2)-H,-W3/2+ZofBlade+(W3-(H2+TS1))/2
K,13,L1,-(H3/2)-H-H1,-W3/2+ZofBlade+(W3-(H2+TS1))/2
K,14,L1,-(H3/2)-H-(H1/2),-W3/2+ZofBlade+(W3-(H2+TS1))/2
L,10,11
L,11,12
L,12,13
LESIZE,2,E_length
LESIZE,2,E_length
FINISH
! /EXIT,NOSAV
/BATCH
/COM,ANSYS RELEASE 2024 R1           BUILD 24.1      UP20231106       22:09:35
/input,menust,tmp,''
/GST,ON
/PLO,INFO,3
/GRO,CURL,ON
/CPLANE,1
WPSTYLE,,,,,,,,0
/INPUT,'FEM_Project_v1','txt','C:\Users\feder\Desktop\FEM\PROJECT\Ansys\',, 0
/COM,ANSYS RELEASE 2024 R1           BUILD 24.1      UP20231106       22:09:46
/SHRINK,0
/ESHAPE,1.0
/EFACET,1
/RATIO,1,1,1
/CFORMAT,32,0
/SHRINK,0
/ESHAPE,1
/EFACET,1
/RATIO,1,1,1
/CFORMAT,32,0
SECPLOT,2,0
SECPLOT,2,0
FINISH
! /EXIT,NOSAV
