!------------------------------------------------------------!
! >>>>>>> user-defined cross section <<<<<<<<< !
!------------------------------------------------------------!
finish
/clear,start,new
/title,sezione trave
!-------------------------------------------------------!
!>>>> geometrical parameters <<<<<<<<< !
!-------------------------------------------------------!
W1 =180 ! mm
W2 = 60 ! mm
S1 = 12 ! mm
S2 = 6 ! mm
H2 = 120 ! mm
!----------------------------------------------------!
!>>>>> Meshing element <<<<<< !
!----------------------------------------------------!
/prep7
et,1,plane183
!------------------------------------------------------!
! >>>>>>>>> Geometry <<<<<<<<<<!
!------------------------------------------------------!
blc4,0,0,W1,S1 ! Bottom lintel
blc4,(W1-W2)/2,S1,S2,H2 ! vertical wall
blc4,(W1/2+W2/2)-S2, S1,S2,H2 ! vertical wall
Blc4,(W1-W2)/2,H2+S1-S2,W2,S2 ! Top lintel
!------------------------------------------------------!
! >>>>> mesh and save <<<<<<<< !
!------------------------------------------------------!
esize,10 ! element size
mshape,0,2D
amesh,all
nummrg,all

secwrite,pale,sect,,plane183

finish
